*HEADING
*RESTART,READ,STEP=2,WRITE
*STEP,INC=300,NLGEOM=YES,UNSYMM=YES,EXTRAPOLATION=NO
 2:  STRAIGHT LINE ROLLING  (Free Rolling)
*STEADY STATE TRANSPORT,INERTIA=YES
0.25, 1.0, , 0.25
*TRANSPORT VELOCITY
 NTIRE,9.04
*OUTPUT,FIELD,FREQ=1
*ELEMENT OUTPUT
 S,LE
*NODE OUTPUT
 U,V,A
*NODE OUTPUT
 SSTIF,SSTSF
*CONTACT OUTPUT,VAR=PRE
*OUTPUT,HISTORY,FREQ=1
*NODE OUTPUT, NSET=ROAD_REFERENCE_POINT
 U, RF, UR1,UR2,UR3,RM1,RM2,RM3
*NODE OUTPUT, NSET=UPPER_RIM_REFERENCE_POINT
 U, RF, UR1,UR2,UR3,RM1,RM2,RM3
*NODE OUTPUT, NSET=LOWER_RIM_REFERENCE_POINT
 U, RF, UR1,UR2,UR3,RM1,RM2,RM3
*NODE OUTPUT, NSET=UPPER_RIM_REFERENCE_POINT
 SSTSRF,SSTIRF
*NODE OUTPUT, NSET=LOWER_RIM_REFERENCE_POINT
 SSTSRF,SSTIRF
*ENERGY OUTPUT,VAR=PRE
*END STEP
