*HEADING
*RESTART,READ
*FILE FORMAT,ZERO INCREMENT
******************************************
*STEP,INC=300,NLGEOM,UNSYMM=YES
 1:  STRAIGHT LINE FREE ROLLING
*STEADY STATE TRANSPORT, LONG TERM
 1.0, 1.0,
*TRANSPORT VELOCITY
 NTIRE, 9.023
*END STEP
******************************************
*STEP,INC=300,NLGEOM,UNSYMM=YES
 2: SLIP (3 degrees)
*STEADY STATE TRANSPORT, LONG TERM
 0.1, 1.0, , 0.1
*MOTION,TYPE=VELOCITY,TRANSLATION
 NTIRE, 1, , 2.774
 NTIRE, 2, , 0.14538
*END STEP
